// SBML level 2 version 1

model mod()
  // EPSP_AChDynValue

  // Compartments:
  compartment comp1 = 1e-16 litre; comp1 is "compartment1";

  // Species:
  // unkiganded active state
  substanceOnly species Cplx0 in comp1 = 0; Cplx0 is "A";  // substance in mole
  // biliganted active state
  substanceOnly species Cplx1 in comp1 = 0; Cplx1 is "ALL";  // substance in mole
  // monoliganded desensitised state
  substanceOnly species Cplx2 in comp1 = 0; Cplx2 is "DL";  // substance in mole
  // monoliganded active state
  substanceOnly species Cplx3 in comp1 = 0; Cplx3 is "AL";  // substance in mole
  // unliganded basal state
  substanceOnly species Cplx4 in comp1 = 1.660578e-21; Cplx4 is "B";  // substance in mole
  // biliganded basal state
  substanceOnly species Cplx5 in comp1 = 0; Cplx5 is "BLL";  // substance in mole
  // fully desensitised state
  substanceOnly species Cplx6 in comp1 = 0; Cplx6 is "D";  // substance in mole
  // biliganded desensitised state
  substanceOnly species Cplx7 in comp1 = 0; Cplx7 is "DLL";  // substance in mole
  // unliganted intermediate
  substanceOnly species Cplx8 in comp1 = 0; Cplx8 is "I";  // substance in mole
  // monoliganded intermediate
  substanceOnly species Cplx9 in comp1 = 0; Cplx9 is "IL";  // substance in mole
  // biliganded intermediate
  substanceOnly species Cplx10 in comp1 = 0; Cplx10 is "ILL";  // substance in mole
  // monoliganded basal state
  substanceOnly species Cplx11 in comp1 = 0; Cplx11 is "BL";  // substance in mole
  // ligand
  substanceOnly species Cplx12 in comp1 = 1.660578e-20; Cplx12 is "L";  // substance in mole

  // Parameters:
  kf_0 = 30000 unimolRate;
  kr_0 = 8000 unimolRate;
  kf_1 = 15000 unimolRate;
  kr_1 = 16000 unimolRate;
  kf_2 = 30000 unimolRate;
  kr_2 = 700 unimolRate;
  kf_3 = 30000 unimolRate;
  kr_3 = 8.64 unimolRate;
  kf_4 = 15000 unimolRate;
  kr_4 = 17.28 unimolRate;
  kf_5 = 0.54 unimolRate;
  kr_5 = 10800 unimolRate;
  kf_6 = 130 unimolRate;
  kr_6 = 2740 unimolRate;
  kf_7 = 30000 unimolRate;
  kr_7 = 4 unimolRate;
  kf_8 = 15000 unimolRate;
  kr_8 = 8 unimolRate;
  kf_9 = 19.7 unimolRate;
  kr_9 = 3.74 unimolRate;
  kf_10 = 19.85 unimolRate;
  kr_10 = 1.74 unimolRate;
  kf_11 = 20 unimolRate;
  kr_11 = 0.81 unimolRate;
  kf_12 = 30000 unimolRate;
  kr_12 = 4 unimolRate;
  kf_13 = 15000 unimolRate;
  kr_13 = 8 unimolRate;
  kf_14 = 0.05 unimolRate;
  kr_14 = 0.0012 unimolRate;
  kf_15 = 0.05 unimolRate;
  kr_15 = 0.0012 unimolRate;
  kf_16 = 0.05 unimolRate;
  kr_16 = 0.0012 unimolRate;
  t1 = 0.05 second;
  t2 = 0.15 second;

  // Reactions:
  // (kf_0 * B - kr_0 * BL) * comp1
  // first ligand on basal
  React0: B -> BL; kf_0*B - kr_0*BL;
  // (kf_1 * BL - kr_1 * BLL) * comp1
  // second ligand on basal
  React1: BL -> BLL; kf_1*BL - kr_1*BLL;
  // (kf_2 * BLL - kr_2 * ALL) * comp1
  // opening of biliganded
  React2: BLL -> ALL; kf_2*BLL - kr_2*ALL;
  // (kf_3 * A - kr_3 * AL) * comp1
  // first ligand on active
  React3: A -> AL; kf_3*A - kr_3*AL;
  // (kf_4 * AL - kr_4 * ALL) * comp1
  // second ligand on active
  React4: AL -> ALL; kf_4*AL - kr_4*ALL;
  // (kf_5 * B - kr_5 * A) * comp1
  // opening of unliganded
  React5: B -> A; kf_5*B - kr_5*A;
  // (kf_6 * BL - kr_6 * AL) * comp1
  // opening of monoliganded
  React6: BL -> AL; kf_6*BL - kr_6*AL;
  // (kf_7 * I - kr_7 * IL) * comp1
  // first ligand on intermediate
  React7: I -> IL; kf_7*I - kr_7*IL;
  // (kf_8 * IL - kr_8 * ILL) * comp1
  // second ligand on intermediate
  React8: IL -> ILL; kf_8*IL - kr_8*ILL;
  // (kf_9 * A - kr_9 * I) * comp1
  // unlig act <=> unlig interm
  React9: A -> I; kf_9*A - kr_9*I;
  // (kf_10 * AL - kr_10 * IL) * comp1
  // monolig act <=> monolig interm
  React10: AL -> IL; kf_10*AL - kr_10*IL;
  // (kf_11 * ALL - kr_11 * ILL) * comp1
  // bilig act <=> bilig interm
  React11: ALL -> ILL; kf_11*ALL - kr_11*ILL;
  // (kf_12 * D - kr_12 * DL) * comp1
  // first ligand on desensitised
  React12: D -> DL; kf_12*D - kr_12*DL;
  // (kf_13 * DL - kr_13 * DLL) * comp1
  // second ligand on desensitised
  React13: DL -> DLL; kf_13*DL - kr_13*DLL;
  // (kf_14 * I - kr_14 * D) * comp1
  // unlig interm <=> unlig desen
  React14: I -> D; kf_14*I - kr_14*D;
  // (kf_15 * IL - kr_15 * DL) * comp1
  // monolig interm <=> monolig desen
  React15: IL -> DL; kf_15*IL - kr_15*DL;
  // (kf_16 * ILL - kr_16 * DLL) * comp1
  // bilig interm <=> bilig desen
  React16: ILL -> DLL; kf_16*ILL - kr_16*DLL;

  // Events:
  at (time > t1): kf_1 = 1.5e4, kf_4 = 1.5e4, kf_8 = 1.5e4, kf_13 = 1.5e4, kf_0 = 3e4, kf_3 = 3e4, kf_7 = 3e4, kf_12 = 3e4;
  at (time > t2): kf_1 = 0, kf_4 = 0, kf_8 = 0, kf_13 = 0, kf_0 = 0, kf_3 = 0, kf_7 = 0, kf_12 = 0;

  // Unit definitions:
  unit unimolRate = 1 / second;
  unit bimolRate = 1 / (mole * litre * second);
end
